# OpenSim document version 40000
Model RightArmAndHand:
  gravity: 0 -9.80665 0
  credits: Sobinov A., Goodman J., Hardesty R., et al.
  length_units: meters
  force_units: N
  publications:
    https://github.com/nishbo/ms_arm_and_hand
    Menegolo Andrea, https://simtk.org/projects/ulb_project
    Delp SL, Anderson FC, Arnold AS, Loan P, Habib A, John CT, Guendelman E, Thelen DG (in press). OpenSim: Open-source Software to Create and Analyze Dynamic Simulations of Movement. IEEE Transactions on Biomedical Engineering. (2007)
    Holzbaur KR, Murray WM, Delp SL.: A model of the upper extremity for simulating musculoskeletal surgery and analyzing neuromuscular control., Ann Biomed Eng. 2005 Jun;33(6):829-40. (2005)
  Ground
  BodySet:
    Body Thorax: mass=0 [kg] mass_center=(0 0 0) inertia=(0 0 0 0 0 0) meshes=thorax.vtp
      WrapEllipsoid RA_Thorax: xyz_body_rotation=(0.0434587 -0.3319616 0.1898918) translation=(-0.0386 -0.1273 0.0709)
          quadrant=all dimensions=(0.1 0.135 0.08)
      WrapEllipsoid LA_Thorax: xyz_body_rotation=(-0.0434587 0.3319616 0.1898918) translation=(-0.0386 -0.1273 -0.0709)
          quadrant=all dimensions=(0.1 0.135 0.08)
    Body RA_clavicle: mass=0 mass_center=(0 0 0) inertia=(0 0 0 0 0 0) meshes=clavicle.vtp
    Body RA_clavphant: mass=0 mass_center=(0 0 0) inertia=(0 0 0 0 0 0)
    Body RA_scapula: mass=0 mass_center=(0 0 0) inertia=(0 0 0 0 0 0) meshes=scapula.vtp
      WrapEllipsoid RA_Deltoid2: active=false xyz_body_rotation=(3.130423 -1.548805 -1.314233)
          translation=(-0.0058 -0.0378 0.0096) quadrant=-y dimensions=(0.03 0.04 0.035)
      WrapTorus RA_Delt3: active=false xyz_body_rotation=(0.6209881 0.32882 -0.5607743)
          translation=(-0.0973 -0.0428 -0.037) quadrant=all inner_radius=0.04 outer_radius=0.06
      WrapTorus RA_INFSP: xyz_body_rotation=(0.02530727 0.5883505 0.1518436) translation=(-0.0561 -0.0199 -0.0112)
          quadrant=all inner_radius=0.008 outer_radius=0.019
      WrapEllipsoid RA_TMIN: xyz_body_rotation=(-2.097537 -0.2808235 -1.763481) translation=(-0.0418 -0.0519 -0.0359)
          quadrant=x dimensions=(0.03 0.03 0.05)
      WrapCylinder RA_TRIlongglen: xyz_body_rotation=(1.375319 -0.2946116 2.435956)
          translation=(-0.0359 -0.0309 -0.0132) quadrant=x radius=0.003 length=0.03
    Body RA_scapphant: mass=0 mass_center=(0 0 0) inertia=(0 0 0 0 0 0)
    Body RA1H_PHANT: mass=0 mass_center=(0 0 0) inertia=(0 0 0 0 0 0)
    Body RA1H_PHANT1: mass=0 mass_center=(0 0 0) inertia=(0 0 0 0 0 0)
    Body RA1H: mass=0 mass_center=(0 0 0) inertia=(0 0 0 0 0 0) meshes=humerus.vtp
      WrapEllipsoid RA_DELT1hh: xyz_body_rotation=(0.05846853 1.004612 0.5703736) translation=(-0.0139 -0.0127 -0.0262)
          quadrant=z dimensions=(0.03 0.1 0.05)
      WrapCylinder RA_delt2hum: xyz_body_rotation=(1.680927 -0.02495821 0.05166175) translation=(0.0017 -0.0958 0.0011)
          quadrant=all radius=0.0094 length=0.05
      WrapEllipsoid RA_delt3hum: xyz_body_rotation=(1.727352 0.07592182 -2.743134) translation=(0.0019 -0.0592 0.0011)
          quadrant=x dimensions=(0.01 0.01 0.05)
      WrapEllipsoid RA_SUPSP: xyz_body_rotation=(0.03804818 0.00855211 -1.306728) translation=(0.0002 0.0077 0.0043)
          quadrant=all dimensions=(0.02 0.02 0.02)
      WrapEllipsoid RA_INFSP_and_TMIN_hum_head: xyz_body_rotation=(-0.2865831 -0.00907571 -0.06841691)
          translation=(-0.0003 0.0026 0.0038) quadrant=all dimensions=(0.02 0.025 0.02)
      WrapEllipsoid RA_SUBSCAP: xyz_body_rotation=(-0.9245009 0.288852 0.381529) translation=(-0.0025 0.0007 -0.0045)
          quadrant=all dimensions=(0.02 0.017 0.028)
      WrapCylinder RA_TMINhum: xyz_body_rotation=(1.753532 0.06928957 2.746276) translation=(-0.0014 -0.0455 0)
          quadrant=x radius=0.007 length=0.07
      WrapSphere RA_TMAJ_LAT_PEC_CORBhh: translation=(0.0007 0 0.006) quadrant=all radius=0.03
      WrapCylinder RA_TMAJ_LAThum: xyz_body_rotation=(1.536413 -0.06370452 1.41424)
          translation=(0.0007 -0.0443 -0.0055) quadrant=-x radius=0.007 length=0.04
      WrapEllipsoid RA_PEC1hh: xyz_body_rotation=(-0.6204646 -0.3104941 0.3637266) translation=(-0.0037 0.0005 -0.0025)
          quadrant=-z dimensions=(0.03 0.02 0.02)
      WrapCylinder RA_PEC12hum: xyz_body_rotation=(1.559277 -0.07749262 -0.9258972) translation=(0.002 -0.0508 -0.0017)
          quadrant=x radius=0.009 length=0.07
      WrapSphere RA_PEC23hh: translation=(-0.0086 0.0021 -0.0004) quadrant=all radius=0.02
      WrapCylinder RA_PEC3hum: xyz_body_rotation=(1.440944 -0.0561996 1.751961) translation=(0.0009 -0.0551 -0.0004)
          quadrant=-x radius=0.008 length=0.07
      WrapCylinder RA_LAT_TMAJhh: xyz_body_rotation=(-0.3050835 -0.01832596 -0.6866125)
          translation=(-0.0224 0.0102 0.0094) quadrant=-y radius=0.007 length=0.045
      WrapSphere RA_LAT_TMAJ2hh: xyz_body_rotation=(-0.1272345 0.2761111 0.01972222)
          translation=(-0.0016 0.0092 0.0052) quadrant=-z radius=0.03
      WrapCylinder RA_CORBhum: xyz_body_rotation=(-1.608321 0.09599311 0.8752826) translation=(0.0027 -0.1202 -0.0059)
          quadrant=x radius=0.008 length=0.05
      WrapEllipsoid RA_TRIlonghh: xyz_body_rotation=(3.001617 -0.853466 2.574186) translation=(-0.0078 -0.0041 -0.0014)
          quadrant=z dimensions=(0.035 0.02 0.02)
      WrapCylinder RA_TRI: xyz_body_rotation=(-0.1401499 -0.00628319 0.1549852) translation=(0.0028 -0.2919 -0.0119)
          quadrant=all radius=0.016 length=0.04
      WrapEllipsoid RA_ANC: xyz_body_rotation=(0.00750492 -0.1966986 1.049292) translation=(0.0134 -0.2861 -0.0008)
          quadrant=-x dimensions=(0.02 0.02 0.02)
      WrapEllipsoid RA_BIClong: xyz_body_rotation=(-2.004336 -1.001644 0.9754645) translation=(0.0033 0.0073 0.0003)
          quadrant=-y dimensions=(0.025 0.02 0.02)
      WrapEllipsoid RA_Elbow_BIC_BRD: xyz_body_rotation=(-0.1286308 0.1375319 0.03071779)
          translation=(0.0019 -0.289 -0.014) quadrant=x dimensions=(0.015 0.015 0.1)
      WrapEllipsoid RA_Elbow_PT_ECRL: xyz_body_rotation=(-0.1610939 -0.1108284 0.6145304)
          translation=(0.003 -0.2872 -0.0069) quadrant=x dimensions=(0.018 0.025 0.035)
    Body RA2U: mass=0 mass_center=(0 0 0) inertia=(0 0 0 0 0 0) meshes=ulna.vtp
      WrapCylinder RA_PQ2: xyz_body_rotation=(1.391376 0.06894051 1.522451) translation=(-0.0012 -0.2092 0.0428)
          quadrant=all radius=0.007 length=0.01
    Body RA2R: mass=0 mass_center=(0 0 0) inertia=(0 0 0 0 0 0) meshes=radius.vtp
      WrapCylinder RA_SUP: xyz_body_rotation=(1.447751 0.3040364 -2.441017) translation=(0.0045 -0.0437 0.0059)
          quadrant=-x radius=0.008 length=0.04
      WrapTorus RA_ECU: xyz_body_rotation=(-0.9866346 -0.1488766 0.222704) translation=(-0.0163 -0.2417 0.0349)
          quadrant=all inner_radius=0.006 outer_radius=0.009
      WrapCylinder RA_PQ1: xyz_body_rotation=(-1.607623 -0.0127409 -2.690251) translation=(0.0281 -0.1986 0.0288)
          quadrant=all radius=0.01 length=0.01
    Body RA3L: mass=0 mass_center=(0 0 0) inertia=(0 0 0 0 0 0) meshes=lunate.vtp
      WrapEllipsoid RA_Extensor_ellipse: xyz_body_rotation=(-0.2508038 0.2855359 0.2328269)
          translation=(0.0007 -0.0135 0.0047) quadrant=z dimensions=(0.05 0.02 0.013)
      WrapTorus RA_ECRL: xyz_body_rotation=(1.538333 0.2343977 0.7311184) translation=(0.0222 -0.0096 0.0208)
          quadrant=all inner_radius=0.008 outer_radius=0.016
      WrapTorus RA_ECRB: xyz_body_rotation=(1.312662 -0.1178097 -0.1162389) translation=(0.0126 -0.0095 0.0186)
          quadrant=all inner_radius=0.008 outer_radius=0.01
      WrapTorus RA_FCR: xyz_body_rotation=(-1.555961 -0.1532399 -0.1000074) translation=(0.0032 -0.0045 -0.019)
          quadrant=all inner_radius=0.001 outer_radius=0.0025
      WrapTorus RA_FCU: xyz_body_rotation=(-1.573763 -0.07976155 0.39235) translation=(-0.0123 -0.0124 -0.0171)
          quadrant=all inner_radius=0.0068 outer_radius=0.008
      WrapEllipsoid RA_PL: xyz_body_rotation=(-0.03159046 0.0996583 0.06335545) translation=(0.0057 -0.018 -0.0041)
          quadrant=-z dimensions=(0.025 0.014 0.012)
      WrapEllipsoid RA_FDS: xyz_body_rotation=(0.00837758 -0.08168141 -0.01710423) translation=(0.0012 -0.0057 -0.0003)
          quadrant=-z dimensions=(0.025 0.013 0.012)
      WrapEllipsoid RA_FDP: xyz_body_rotation=(-1.467473 -0.1946042 0.121824) translation=(-0.0022 -0.0069 0.0032)
          quadrant=y dimensions=(0.025 0.013 0.012)
      WrapTorus RA_ED5: xyz_body_rotation=(2.363176 0.1930334 -0.2691298) translation=(-0.0128 -0.0133 0.0148)
          quadrant=all inner_radius=0.008 outer_radius=0.012
      WrapTorus RA_ED4: xyz_body_rotation=(1.983916 0.100531 0.5230752) translation=(-0.0098 -0.0137 0.0166)
          quadrant=all inner_radius=0.009 outer_radius=0.011
      WrapTorus RA_ED3: xyz_body_rotation=(1.993166 0.1979203 0.3682645) translation=(-0.0007 -0.0117 0.0191)
          quadrant=all inner_radius=0.009 outer_radius=0.012
      WrapTorus RA_ED2: xyz_body_rotation=(1.697682 0.08970992 0.00767945) translation=(0.009 -0.0149 0.0211)
          quadrant=all inner_radius=0.009 outer_radius=0.012
      WrapEllipsoid RA_EDM: xyz_body_rotation=(2.962696 0.1593486 0.1179843) translation=(-0.0167 -0.0022 0.0048)
          quadrant=-z dimensions=(0.018 0.014 0.008)
      WrapEllipsoid RA_FPL: xyz_body_rotation=(-0.1663299 -0.08220501 -0.06597345) translation=(0.017 -0.025 -0.0033)
          quadrant=-z dimensions=(0.016 0.01 0.01)
    Body RA3S: mass=0 mass_center=(0 0 0) inertia=(0 0 0 0 0 0) meshes=scaphoid.vtp
    Body RA3P: mass=0 mass_center=(0 0 0) inertia=(0 0 0 0 0 0) meshes=pisiform.vtp
    Body RA3Q: mass=0 mass_center=(0 0 0) inertia=(0 0 0 0 0 0) meshes=triquetrum.vtp
    Body RA3C: mass=0 mass_center=(0 0 0) inertia=(0 0 0 0 0 0) meshes=capitate.vtp
    Body RA3T: mass=0 mass_center=(0 0 0) inertia=(0 0 0 0 0 0) meshes=trapezium.vtp
    Body RA3O: mass=0 mass_center=(0 0 0) inertia=(0 0 0 0 0 0) meshes=trapezoid.vtp
    Body RA3H: mass=0 mass_center=(0 0 0) inertia=(0 0 0 0 0 0) meshes=hamate.vtp
    Body RA4M1_PHANT: mass=0 mass_center=(0 0 0) inertia=(0 0 0 0 0 0)
      WrapTorus RA_APL: active=false xyz_body_rotation=(-1.609892 0.2478367 -0.0301942)
          translation=(0.0082 0.0023 -0.0101) quadrant=all inner_radius=0.004 outer_radius=0.008
    Body RA4M1: mass=0 mass_center=(0 0 0) inertia=(0 0 0 0 0 0) meshes=1mc.vtp
      WrapCylinder RA_MPthumb: xyz_body_rotation=(0.3213151 0.1101303 -0.834791) translation=(0.0177 -0.0305 -0.0143)
          quadrant=all radius=0.0085 length=0.02
    Body RA4M2: mass=0 mass_center=(0 0 0) inertia=(0 0 0 0 0 0) meshes=2mc.vtp
      WrapEllipsoid RA_2ndmcp: xyz_body_rotation=(1.486671 -1.296605 2.43072) translation=(0.0059 -0.0304 -0.0006)
          quadrant=-x dimensions=(0.005 0.005 0.03)
    Body RA4M3: mass=0 mass_center=(0 0 0) inertia=(0 0 0 0 0 0) meshes=3mc.vtp
    Body RA4M4: mass=0 mass_center=(0 0 0) inertia=(0 0 0 0 0 0) meshes=4mc.vtp
    Body RA4M5: mass=0 mass_center=(0 0 0) inertia=(0 0 0 0 0 0) meshes=5mc.vtp
    Body RA5P1: mass=0 mass_center=(0 0 0) inertia=(0 0 0 0 0 0) meshes=thumbprox.vtp
      WrapCylinder RA_IPthumb: xyz_body_rotation=(0.3047345 0.01291544 0.08796459) translation=(0.0121 -0.0302 -0.0096)
          quadrant=-x radius=0.0045 length=0.01
    Body RA6D1: mass=0 mass_center=(0 0 0) inertia=(0 0 0 0 0 0) meshes=thumbdist.vtp
    Body RA5P2: mass=0 mass_center=(0 0 0) inertia=(0 0 0 0 0 0) meshes=2proxph.vtp
      WrapCylinder RA_Secondpm: xyz_body_rotation=(0.7419395 -1.473931 0.7096509) translation=(0.0075 -0.0407 0.0061)
          quadrant=all radius=0.004 length=0.01
    Body RA6M2: mass=0 mass_center=(0 0 0) inertia=(0 0 0 0 0 0) meshes=2midph.vtp
      WrapCylinder RA_Secondmd: xyz_body_rotation=(0.5017822 -1.413019 0.6473426) translation=(0.0036 -0.0243 0.0003)
          quadrant=x radius=0.003 length=0.01
    Body RA7D2: mass=0 mass_center=(0 0 0) inertia=(0 0 0 0 0 0) meshes=2distph.vtp
    Body RA5P3: mass=0 mass_center=(0 0 0) inertia=(0 0 0 0 0 0) meshes=3proxph.vtp
    Body RA6M3: mass=0 mass_center=(0 0 0) inertia=(0 0 0 0 0 0) meshes=3midph.vtp
    Body RA7D3: mass=0 mass_center=(0 0 0) inertia=(0 0 0 0 0 0) meshes=3distph.vtp
    Body RA5P4: mass=0 mass_center=(0 0 0) inertia=(0 0 0 0 0 0) meshes=4proxph.vtp
    Body RA6M4: mass=0 mass_center=(0 0 0) inertia=(0 0 0 0 0 0) meshes=4midph.vtp
    Body RA7D4: mass=0 mass_center=(0 0 0) inertia=(0 0 0 0 0 0) meshes=4distph.vtp
    Body RA5P5: mass=0 mass_center=(0 0 0) inertia=(0 0 0 0 0 0) meshes=5proxph.vtp
    Body RA6M5: mass=0 mass_center=(0 0 0) inertia=(0 0 0 0 0 0) meshes=5midph.vtp
    Body RA7D5: mass=0 mass_center=(0 0 0) inertia=(0 0 0 0 0 0) meshes=5distph.vtp
  JointSet:
    CustomJoint ground_Thorax: socket_parent_frame=ground_offset socket_child_frame=Thorax_offset
      Coordinate Thorax_rot1: default_value=0 range=(-1.5708 1.5708) clamped=true locked=true
      Coordinate Thorax_rot2: default_value=0 range=(-1.5708 1.5708) clamped=true locked=true
      Coordinate Thorax_rot3: default_value=0 range=(-1.5708 1.5708) clamped=true locked=true
      Coordinate Thorax_tra1: default_value=0 range=(-3 3) clamped=true
      Coordinate Thorax_tra2: default_value=0 range=(-3 3) clamped=true
      Coordinate Thorax_tra3: default_value=0 range=(-3 3) clamped=true
      PhysicalOffsetFrame ground_offset: socket_parent=/ground translation=(0 0 0) [meters]
      PhysicalOffsetFrame Thorax_offset: socket_parent=/bodyset/Thorax translation=(0 0 0)
      SpatialTransform:
        TransformAxis rotation1: coordinates=Thorax_rot1 axis=(0 0 1) LinearFunction(coefficients=1 0)
        TransformAxis rotation2: coordinates=Thorax_rot2 axis=(0 1 0) LinearFunction(coefficients=1 0)
        TransformAxis rotation3: coordinates=Thorax_rot3 axis=(1 0 0) LinearFunction(coefficients=1 0)
        TransformAxis translation1: coordinates=Thorax_tra1 axis=(1 0 0) LinearFunction(coefficients=1 0)
        TransformAxis translation2: coordinates=Thorax_tra2 axis=(0 1 0) LinearFunction(coefficients=1 0)
        TransformAxis translation3: coordinates=Thorax_tra3 axis=(0 0 1) LinearFunction(coefficients=1 0)
    CustomJoint RA_sternoclavicular: socket_parent_frame=Thorax_offset socket_child_frame=RA_clavicle_offset
      Coordinate ra_sternoclavicular_r2_d: default_value=0 range=(-99999.9 99999.9) clamped=false
      Coordinate ra_sternoclavicular_r3_d: default_value=0 range=(-99999.9 99999.9) clamped=false
      PhysicalOffsetFrame Thorax_offset: socket_parent=/bodyset/Thorax translation=(0.006325 0.00693 0.025465)
      PhysicalOffsetFrame RA_clavicle_offset: socket_parent=/bodyset/RA_clavicle translation=(0 0 0)
      SpatialTransform: axes_held_at_zero=(rotation3 translation1 translation2 translation3)
        TransformAxis rotation1: coordinates=ra_sternoclavicular_r2_d axis=(0.0153 0.9892987 -0.1451)
            LinearFunction(coefficients=1 0)
        TransformAxis rotation2: coordinates=ra_sternoclavicular_r3_d axis=(-0.9944725 0 -0.104997)
            LinearFunction(coefficients=1 0)
    CustomJoint RA_unrotscap: socket_parent_frame=RA_clavicle_offset socket_child_frame=RA_clavphant_offset
      Coordinate ra_unrotscap_r3_d: default_value=0 range=(-99999.9 99999.9) clamped=true
      Coordinate ra_unrotscap_r2_d: default_value=0 range=(-99999.9 99999.9) clamped=true
      PhysicalOffsetFrame RA_clavicle_offset: socket_parent=/bodyset/RA_clavicle
          translation=(-0.01433 0.02007 0.135535)
      PhysicalOffsetFrame RA_clavphant_offset: socket_parent=/bodyset/RA_clavphant translation=(0 0 0)
      SpatialTransform: axes_held_at_zero=(rotation3 translation1 translation2 translation3)
        TransformAxis rotation1: coordinates=ra_unrotscap_r3_d axis=(-0.9944725 0 -0.104997)
            LinearFunction(coefficients=1 0)
        TransformAxis rotation2: coordinates=ra_unrotscap_r2_d axis=(0.0153 0.9892987 -0.1451)
            LinearFunction(coefficients=1 0)
    CustomJoint RA_acromioclavicular: socket_parent_frame=RA_clavphant_offset socket_child_frame=RA_scapula_offset
      Coordinate ra_acromioclavicular_r2_d: default_value=0 range=(-99999.9 99999.9) clamped=true
      Coordinate ra_acromioclavicular_r3_d: default_value=0 range=(-99999.9 99999.9) clamped=true
      Coordinate ra_acromioclavicular_r1_d: default_value=0 range=(-99999.9 99999.9) clamped=true
      PhysicalOffsetFrame RA_clavphant_offset: socket_parent=/bodyset/RA_clavphant translation=(0 0 0)
      PhysicalOffsetFrame RA_scapula_offset: socket_parent=/bodyset/RA_scapula translation=(0 0 0)
      SpatialTransform: axes_held_at_zero=(translation1 translation2 translation3)
        TransformAxis rotation1: coordinates=ra_acromioclavicular_r2_d axis=(0.1570949 0.9472686 -0.2792909)
            LinearFunction(coefficients=1 0)
        TransformAxis rotation2: coordinates=ra_acromioclavicular_r3_d axis=(-0.754084 0.297594 0.585487)
            LinearFunction(coefficients=1 0)
        TransformAxis rotation3: coordinates=ra_acromioclavicular_r1_d axis=(0.6376999 0.1186 0.7610998)
            LinearFunction(coefficients=1 0)
    CustomJoint RA_unrothum: socket_parent_frame=RA_scapula_offset socket_child_frame=RA_scapphant_offset
      Coordinate ra_unrothum_r1_d: default_value=0 range=(-99999.9 99999.9) clamped=false
      Coordinate ra_unrothum_r3_d: default_value=0 range=(-99999.9 99999.9) clamped=false
      Coordinate ra_unrothum_r2_d: default_value=0 range=(-99999.9 99999.9) clamped=false
      PhysicalOffsetFrame RA_scapula_offset: socket_parent=/bodyset/RA_scapula translation=(-0.00955 -0.034 0.009)
      PhysicalOffsetFrame RA_scapphant_offset: socket_parent=/bodyset/RA_scapphant translation=(0 0 0)
      SpatialTransform: axes_held_at_zero=(translation1 translation2 translation3)
        TransformAxis rotation1: coordinates=ra_unrothum_r1_d axis=(0.6376999 0.1186 0.7610998)
            LinearFunction(coefficients=1 0)
        TransformAxis rotation2: coordinates=ra_unrothum_r3_d axis=(-0.754084 0.297594 0.585487)
            LinearFunction(coefficients=1 0)
        TransformAxis rotation3: coordinates=ra_unrothum_r2_d axis=(0.1570949 0.9472686 -0.2792909)
            LinearFunction(coefficients=1 0)
    CustomJoint RA_shoulder0: socket_parent_frame=RA_scapphant_offset socket_child_frame=RA1H_PHANT_offset
      Coordinate ra_sh_elv_angle: default_value=0 range=(-1.570796 2.268928) clamped=true
      PhysicalOffsetFrame RA_scapphant_offset: socket_parent=/bodyset/RA_scapphant translation=(0 0 0)
      PhysicalOffsetFrame RA1H_PHANT_offset: socket_parent=/bodyset/RA1H_PHANT translation=(0 0 0)
      SpatialTransform: axes_held_at_zero=(rotation2 rotation3 translation1 translation2 translation3)
        TransformAxis rotation1: coordinates=ra_sh_elv_angle axis=(0.004800001 0.9990892 0.04240001)
            LinearFunction(coefficients=1 0)
    CustomJoint RA_shoulder1: socket_parent_frame=RA1H_PHANT_offset socket_child_frame=RA1H_PHANT1_offset
      Coordinate ra_sh_elv: default_value=0 range=(0 3.141593) clamped=true
      Coordinate ra_shoulder1_r2_d: default_value=0 range=(-99999.9 99999.9) clamped=false
      PhysicalOffsetFrame RA1H_PHANT_offset: socket_parent=/bodyset/RA1H_PHANT translation=(0 0 0)
      PhysicalOffsetFrame RA1H_PHANT1_offset: socket_parent=/bodyset/RA1H_PHANT1 translation=(0 0 0)
      SpatialTransform: axes_held_at_zero=(rotation3 translation1 translation2 translation3)
        TransformAxis rotation1: coordinates=ra_sh_elv axis=(-0.9982614 0.002300001 0.05889802)
            LinearFunction(coefficients=1 0)
        TransformAxis rotation2: coordinates=ra_shoulder1_r2_d axis=(0.004800001 0.9990892 0.04240001)
            LinearFunction(coefficients=1 0)
    CustomJoint RA_shoulder2: socket_parent_frame=RA1H_PHANT1_offset socket_child_frame=RA1H_offset
      Coordinate ra_sh_rot: default_value=0 range=(-1.570796 0.3490659) clamped=true
      PhysicalOffsetFrame RA1H_PHANT1_offset: socket_parent=/bodyset/RA1H_PHANT1 translation=(0 0 0)
      PhysicalOffsetFrame RA1H_offset: socket_parent=/bodyset/RA1H translation=(0 0 0)
      SpatialTransform: axes_held_at_zero=(rotation2 rotation3 translation1 translation2 translation3)
        TransformAxis rotation1: coordinates=ra_sh_rot axis=(0.004800001 0.9990892 0.04240001)
            LinearFunction(coefficients=1 0)
    CustomJoint RA1H_RA2U: socket_parent_frame=RA1H_offset socket_child_frame=RA2U_offset
      Coordinate ra_el_e_f: default_value=0 range=(0 2.268928) clamped=true
      PhysicalOffsetFrame RA1H_offset: socket_parent=/bodyset/RA1H translation=(0.0061 -0.2904 -0.0123)
      PhysicalOffsetFrame RA2U_offset: socket_parent=/bodyset/RA2U translation=(0 0 0)
      SpatialTransform: axes_held_at_zero=(rotation2 rotation3 translation1 translation2 translation3)
        TransformAxis rotation1: coordinates=ra_el_e_f axis=(0.04940001 0.03660001 0.9981082)
            LinearFunction(coefficients=1 0)
    CustomJoint RA2U_RA2R: socket_parent_frame=RA2U_offset socket_child_frame=RA2R_offset
      Coordinate ra_wr_sup_pro: default_value=0 range=(-1.570796 1.570796) clamped=true
      PhysicalOffsetFrame RA2U_offset: socket_parent=/bodyset/RA2U translation=(0.0004 -0.011503 0.019999)
      PhysicalOffsetFrame RA2R_offset: socket_parent=/bodyset/RA2R translation=(0 0 0)
      SpatialTransform: axes_held_at_zero=(rotation2 rotation3 translation1 translation2 translation3)
        TransformAxis rotation1: coordinates=ra_wr_sup_pro axis=(-0.01716099 0.9926656 -0.119668)
            LinearFunction(coefficients=1 0)
    CustomJoint RA2R_RA3L: socket_parent_frame=RA2R_offset socket_child_frame=RA3L_offset
      Coordinate ra_wr_rd_ud: default_value=0 range=(-0.1745329 0.4363323) clamped=true
      Coordinate ra_wr_e_f: default_value=0 range=(-1.22173 1.22173) clamped=true
      PhysicalOffsetFrame RA2R_offset: socket_parent=/bodyset/RA2R translation=(0.018 -0.242 0.025)
      PhysicalOffsetFrame RA3L_offset: socket_parent=/bodyset/RA3L translation=(0 0 0)
      SpatialTransform: axes_held_at_zero=(rotation3 translation1 translation2 translation3)
        TransformAxis rotation1: coordinates=ra_wr_rd_ud axis=(-0.819064 -0.135611 -0.557444)
          SimmSpline: x=(-0.174533 0 0.436332) y=(-0.174533 0 0.436332)
        TransformAxis rotation2: coordinates=ra_wr_e_f axis=(0.9564267 -0.2522069 0.147104)
          SimmSpline: x=(-1.5708 1.5708) y=(-0.785398 0.785398)
    WeldJoint RA3L_RA3S_W: socket_parent_frame=RA3L_offset socket_child_frame=RA3S_offset
      PhysicalOffsetFrame RA3L_offset: socket_parent=/bodyset/RA3L translation=(0.012345 -0.004464 -0.001254)
      PhysicalOffsetFrame RA3S_offset: socket_parent=/bodyset/RA3S translation=(0 0 0)
    WeldJoint RA3S_RA3P_W: socket_parent_frame=RA3L_offset socket_child_frame=RA3P_offset
      PhysicalOffsetFrame RA3L_offset: socket_parent=/bodyset/RA3L translation=(-0.013388 -0.009886 -0.010593)
      PhysicalOffsetFrame RA3P_offset: socket_parent=/bodyset/RA3P translation=(0 0 0)
    WeldJoint RA3L_RA3Q_W: socket_parent_frame=RA3L_offset socket_child_frame=RA3Q_offset
      PhysicalOffsetFrame RA3L_offset: socket_parent=/bodyset/RA3L translation=(-0.010784 -0.007499 -0.001289)
      PhysicalOffsetFrame RA3Q_offset: socket_parent=/bodyset/RA3Q translation=(0 0 0)
    CustomJoint RA3L_RA3C: socket_parent_frame=RA3L_offset socket_child_frame=RA3C_offset
      Coordinate ra_proximal_distal_r1_d: default_value=0 range=(-99999.9 99999.9) clamped=false
      Coordinate ra_proximal_distal_r3_d: default_value=0 range=(-99999.9 99999.9) clamped=false
      PhysicalOffsetFrame RA3L_offset: socket_parent=/bodyset/RA3L translation=(0.003992 -0.015054 0.002327)
      PhysicalOffsetFrame RA3C_offset: socket_parent=/bodyset/RA3C translation=(0 0 0)
      SpatialTransform: axes_held_at_zero=(rotation3 translation1 translation2 translation3)
        TransformAxis rotation1: coordinates=ra_proximal_distal_r1_d axis=(0.8991357 -0.3490529 -0.2640399)
            LinearFunction(coefficients=1 0)
        TransformAxis rotation2: coordinates=ra_proximal_distal_r3_d axis=(0.9971185 0.01069999 -0.07510096)
            LinearFunction(coefficients=1 0)
    WeldJoint RA3C_RA3T_W: socket_parent_frame=RA3C_offset socket_child_frame=RA3T_offset
      PhysicalOffsetFrame RA3C_offset: socket_parent=/bodyset/RA3C translation=(0.015293 -0.004569 -0.010308)
      PhysicalOffsetFrame RA3T_offset: socket_parent=/bodyset/RA3T translation=(0 0 0)
    WeldJoint RA3C_RA3O_W: socket_parent_frame=RA3C_offset socket_child_frame=RA3O_offset
      PhysicalOffsetFrame RA3C_offset: socket_parent=/bodyset/RA3C translation=(0.009143 -0.004062 -0.002464)
      PhysicalOffsetFrame RA3O_offset: socket_parent=/bodyset/RA3O translation=(0 0 0)
    WeldJoint RA3C_RA3H_W: socket_parent_frame=RA3C_offset socket_child_frame=RA3H_offset
      PhysicalOffsetFrame RA3C_offset: socket_parent=/bodyset/RA3C translation=(-0.010969 -0.002495 -0.00075)
      PhysicalOffsetFrame RA3H_offset: socket_parent=/bodyset/RA3H translation=(0 0 0)
    CustomJoint RA3T_RA4M1_PHANT: socket_parent_frame=RA3T_offset socket_child_frame=RA4M1_PHANT_offset
      Coordinate ra_cmc1_f_e: default_value=0 range=(-0.2617994 0.7853982) clamped=true
      Coordinate ra_cmc1_opp: default_value=0 range=(-0.7853982 0.7853982) clamped=true
      PhysicalOffsetFrame RA3T_offset: socket_parent=/bodyset/RA3T translation=(0 0 0)
      PhysicalOffsetFrame RA4M1_PHANT_offset: socket_parent=/bodyset/RA4M1_PHANT translation=(0 0 0)
      SpatialTransform: axes_held_at_zero=(rotation3 translation1 translation2 translation3)
        TransformAxis rotation1: coordinates=ra_cmc1_f_e axis=(-0.04239899 -0.6652859 0.7453838)
            LinearFunction(coefficients=1 0)
        TransformAxis rotation2: coordinates=ra_cmc1_opp axis=(-0.6666976 0.6189287 0.4152607)
            LinearFunction(coefficients=1 0)
    CustomJoint RA4M1_PHANT_RA4M1: socket_parent_frame=RA4M1_PHANT_offset socket_child_frame=RA4M1_offset
      Coordinate ra_cmc1_ad_ab: default_value=0 range=(-0.4363323 0.4363323) clamped=true
      PhysicalOffsetFrame RA4M1_PHANT_offset: socket_parent=/bodyset/RA4M1_PHANT translation=(0.0072 -0.0054 -0.0025)
      PhysicalOffsetFrame RA4M1_offset: socket_parent=/bodyset/RA4M1 translation=(0 0 0)
      SpatialTransform: axes_held_at_zero=(rotation2 rotation3 translation1 translation2 translation3)
        TransformAxis rotation1: coordinates=ra_cmc1_ad_ab axis=(0.495557 0.731736 0.467959)
            LinearFunction(coefficients=1 0)
    WeldJoint RA3C_RA4M2_W: socket_parent_frame=RA3C_offset socket_child_frame=RA4M2_offset
      PhysicalOffsetFrame RA3C_offset: socket_parent=/bodyset/RA3C translation=(0.014685 -0.03762 0.005032)
      PhysicalOffsetFrame RA4M2_offset: socket_parent=/bodyset/RA4M2 translation=(0 0 0)
    WeldJoint RA3C_RA4M3_W: socket_parent_frame=RA3C_offset socket_child_frame=RA4M3_offset
      PhysicalOffsetFrame RA3C_offset: socket_parent=/bodyset/RA3C translation=(0.000477 -0.039239 0.007377)
      PhysicalOffsetFrame RA4M3_offset: socket_parent=/bodyset/RA4M3 translation=(0 0 0)
    WeldJoint RA3C_RA4M4_W: socket_parent_frame=RA3C_offset socket_child_frame=RA4M4_offset
      PhysicalOffsetFrame RA3C_offset: socket_parent=/bodyset/RA3C translation=(-0.012046 -0.040519 0.003513)
      PhysicalOffsetFrame RA4M4_offset: socket_parent=/bodyset/RA4M4 translation=(0 0 0)
    WeldJoint RA3C_RA4M5_W: socket_parent_frame=RA3C_offset socket_child_frame=RA4M5_offset
      PhysicalOffsetFrame RA3C_offset: socket_parent=/bodyset/RA3C translation=(-0.021896 -0.034683 -0.004218)
      PhysicalOffsetFrame RA4M5_offset: socket_parent=/bodyset/RA4M5 translation=(0 0 0)
    CustomJoint RA4M1_RA5P1: socket_parent_frame=RA4M1_offset socket_child_frame=RA5P1_offset
      Coordinate ra_mcp1_e_f: default_value=0 range=(-0.5235988 0.6981317) clamped=true
      PhysicalOffsetFrame RA4M1_offset: socket_parent=/bodyset/RA4M1 translation=(0.0165 -0.0292 -0.0127)
      PhysicalOffsetFrame RA5P1_offset: socket_parent=/bodyset/RA5P1 translation=(0 0 0)
      SpatialTransform: axes_held_at_zero=(rotation2 rotation3 translation1 translation2 translation3)
        TransformAxis rotation1: coordinates=ra_mcp1_e_f axis=(0 0.2 -1) LinearFunction(coefficients=1 0)
    CustomJoint RA5P1_RA6D1: socket_parent_frame=RA5P1_offset socket_child_frame=RA6D1_offset
      Coordinate ra_ip1_e_f: default_value=0 range=(-1.308997 1.308997) clamped=true
      PhysicalOffsetFrame RA5P1_offset: socket_parent=/bodyset/RA5P1 translation=(0.014 -0.0259 -0.0101)
      PhysicalOffsetFrame RA6D1_offset: socket_parent=/bodyset/RA6D1 translation=(0 0 0)
      SpatialTransform: axes_held_at_zero=(rotation2 rotation3 translation1 translation2 translation3)
        TransformAxis rotation1: coordinates=ra_ip1_e_f axis=(0.05010201 0.4796231 -0.8760431)
            LinearFunction(coefficients=1 0)
    CustomJoint RA4M2_RA5P2: socket_parent_frame=RA4M2_offset socket_child_frame=RA5P2_offset
      Coordinate ra_mcp2_e_f: default_value=0 range=(-0.8726646 1.570796) clamped=true
      Coordinate ra_mcp2_ad_ab: default_value=0 range=(-0.2617994 0.5217994) clamped=true
      PhysicalOffsetFrame RA4M2_offset: socket_parent=/bodyset/RA4M2 translation=(0.003501 -0.028243 0.00362)
          orientation=(2.97153 -0.173733 1.59226) [radians]
      PhysicalOffsetFrame RA5P2_offset: socket_parent=/bodyset/RA5P2 translation=(0 0 0)
          orientation=(2.97153 -0.173733 1.59226)
      SpatialTransform: axes_held_at_zero=(rotation3 translation1 translation2 translation3)
        TransformAxis rotation1: coordinates=ra_mcp2_e_f axis=(0 -1 0) LinearFunction(coefficients=1 0)
        TransformAxis rotation2: coordinates=ra_mcp2_ad_ab axis=(0 0 -1) LinearFunction(coefficients=1 0)
    CustomJoint RA5P2_RA6M2: socket_parent_frame=RA5P2_offset socket_child_frame=RA6M2_offset
      Coordinate ra_pip2_e_f: default_value=0 range=(0 2.094395) clamped=true
      PhysicalOffsetFrame RA5P2_offset: socket_parent=/bodyset/RA5P2 translation=(0.007517 -0.041273 0.007326)
          orientation=(0.869684 -1.4208 2.3312)
      PhysicalOffsetFrame RA6M2_offset: socket_parent=/bodyset/RA6M2 translation=(0 0 0)
          orientation=(0.869684 -1.4208 2.3312)
      SpatialTransform: axes_held_at_zero=(rotation2 rotation3 translation1 translation2 translation3)
        TransformAxis rotation1: coordinates=ra_pip2_e_f axis=(0.1 0 -1) LinearFunction(coefficients=1 0)
    CustomJoint RA6M2_RA7D2: socket_parent_frame=RA6M2_offset socket_child_frame=RA7D2_offset
      Coordinate ra_dip2_e_f: default_value=0 range=(-0.5235988 1.570796) clamped=true
      PhysicalOffsetFrame RA6M2_offset: socket_parent=/bodyset/RA6M2 translation=(0.003333 -0.024888 0.00122)
          orientation=(0.326422 -0.0790475 2.03982)
      PhysicalOffsetFrame RA7D2_offset: socket_parent=/bodyset/RA7D2 translation=(0 0 0)
          orientation=(0.326422 -0.0790475 2.03982)
      SpatialTransform: axes_held_at_zero=(rotation2 rotation3 translation1 translation2 translation3)
        TransformAxis rotation1: coordinates=ra_dip2_e_f axis=(-0.4 -1 -0.2) LinearFunction(coefficients=1 0)
    CustomJoint RA4M3_RA5P3: socket_parent_frame=RA4M3_offset socket_child_frame=RA5P3_offset
      Coordinate ra_mcp3_e_f: default_value=0 range=(-0.8726646 1.570796) clamped=true
      Coordinate ra_mcp3_rd_ud: default_value=0 range=(-0.2617994 0.2617994) clamped=true
      PhysicalOffsetFrame RA4M3_offset: socket_parent=/bodyset/RA4M3 translation=(0.00024 -0.02629 0.001778)
      PhysicalOffsetFrame RA5P3_offset: socket_parent=/bodyset/RA5P3 translation=(0 0 0)
      SpatialTransform: axes_held_at_zero=(rotation3 translation1 translation2 translation3)
        TransformAxis rotation1: coordinates=ra_mcp3_e_f axis=(1 0 0) LinearFunction(coefficients=1 0)
        TransformAxis rotation2: coordinates=ra_mcp3_rd_ud axis=(0 -0.5 -1) LinearFunction(coefficients=1 0)
    CustomJoint RA5P3_RA6M3: socket_parent_frame=RA5P3_offset socket_child_frame=RA6M3_offset
      Coordinate ra_pip3_e_f: default_value=0 range=(0 2.094395) clamped=true
      PhysicalOffsetFrame RA5P3_offset: socket_parent=/bodyset/RA5P3 translation=(0.00165 -0.044211 0.00623)
      PhysicalOffsetFrame RA6M3_offset: socket_parent=/bodyset/RA6M3 translation=(0 0 0)
      SpatialTransform: axes_held_at_zero=(rotation2 rotation3 translation1 translation2 translation3)
        TransformAxis rotation1: coordinates=ra_pip3_e_f axis=(1 0 0) LinearFunction(coefficients=1 0)
    CustomJoint RA6M3_RA7D3: socket_parent_frame=RA6M3_offset socket_child_frame=RA7D3_offset
      Coordinate ra_dip3_e_f: default_value=0 range=(-0.5235988 1.570796) clamped=true
      PhysicalOffsetFrame RA6M3_offset: socket_parent=/bodyset/RA6M3 translation=(0.001365 -0.029047 0.001954)
      PhysicalOffsetFrame RA7D3_offset: socket_parent=/bodyset/RA7D3 translation=(0 0 0)
      SpatialTransform: axes_held_at_zero=(rotation2 rotation3 translation1 translation2 translation3)
        TransformAxis rotation1: coordinates=ra_dip3_e_f axis=(1 0.1 0) LinearFunction(coefficients=1 0)
    CustomJoint RA4M4_RA5P4: socket_parent_frame=RA4M4_offset socket_child_frame=RA5P4_offset
      Coordinate ra_mcp4_e_f: default_value=0 range=(-0.8726646 1.570796) clamped=true
      Coordinate ra_mcp4_ad_ab: default_value=0 range=(-0.2617994 0.2617994) clamped=true
      PhysicalOffsetFrame RA4M4_offset: socket_parent=/bodyset/RA4M4 translation=(-0.00183 -0.023689 -0.000173)
      PhysicalOffsetFrame RA5P4_offset: socket_parent=/bodyset/RA5P4 translation=(0 0 0)
      SpatialTransform: axes_held_at_zero=(rotation3 translation1 translation2 translation3)
        TransformAxis rotation1: coordinates=ra_mcp4_e_f axis=(1 -0.05 0.1) LinearFunction(coefficients=1 0)
        TransformAxis rotation2: coordinates=ra_mcp4_ad_ab axis=(0.1 -0.7 -1) LinearFunction(coefficients=1 0)
    CustomJoint RA5P4_RA6M4: socket_parent_frame=RA5P4_offset socket_child_frame=RA6M4_offset
      Coordinate ra_pip4_e_f: default_value=0 range=(0 2.094395) clamped=true
      PhysicalOffsetFrame RA5P4_offset: socket_parent=/bodyset/RA5P4 translation=(-0.003528 -0.040255 0.001345)
          orientation=(-3.14059 -0.0151074 -3.0091)
      PhysicalOffsetFrame RA6M4_offset: socket_parent=/bodyset/RA6M4 translation=(0 0 0)
          orientation=(-3.14059 -0.0151074 -3.0091)
      SpatialTransform: axes_held_at_zero=(rotation2 rotation3 translation1 translation2 translation3)
        TransformAxis rotation1: coordinates=ra_pip4_e_f axis=(-1 0.2 -0.4) LinearFunction(coefficients=1 0)
    CustomJoint RA6M4_RA7D4: socket_parent_frame=RA6M4_offset socket_child_frame=RA7D4_offset
      Coordinate ra_dip4_e_f: default_value=0 range=(-0.5235988 1.570796) clamped=true
      PhysicalOffsetFrame RA6M4_offset: socket_parent=/bodyset/RA6M4 translation=(-0.002317 -0.024789 0.000563)
          orientation=(3.13802 0.0382843 -2.95545)
      PhysicalOffsetFrame RA7D4_offset: socket_parent=/bodyset/RA7D4 translation=(0 0 0)
          orientation=(3.13802 0.0382843 -2.95545)
      SpatialTransform: axes_held_at_zero=(rotation2 rotation3 translation1 translation2 translation3)
        TransformAxis rotation1: coordinates=ra_dip4_e_f axis=(-1 0.1 -0.5) LinearFunction(coefficients=1 0)
    CustomJoint RA4M5_RA5P5: socket_parent_frame=RA4M5_offset socket_child_frame=RA5P5_offset
      Coordinate ra_mcp5_e_f: default_value=0 range=(-0.8726646 1.570796) clamped=true
      Coordinate ra_mcp5_ad_ab: default_value=0 range=(-0.2617994 0.5217994) clamped=true
      PhysicalOffsetFrame RA4M5_offset: socket_parent=/bodyset/RA4M5 translation=(-0.001597 -0.021431 -0.001496)
          orientation=(2.97153 -0.173733 1.59226)
      PhysicalOffsetFrame RA5P5_offset: socket_parent=/bodyset/RA5P5 translation=(0 0 0)
          orientation=(2.97153 -0.173733 1.59226)
      SpatialTransform: axes_held_at_zero=(rotation3 translation1 translation2 translation3)
        TransformAxis rotation1: coordinates=ra_mcp5_e_f axis=(0.1 -1 -0.7) LinearFunction(coefficients=1 0)
        TransformAxis rotation2: coordinates=ra_mcp5_ad_ab axis=(0 -0.7 1) LinearFunction(coefficients=1 0)
    CustomJoint RA5P5_RA6M5: socket_parent_frame=RA5P5_offset socket_child_frame=RA6M5_offset
      Coordinate ra_pip5_e_f: default_value=0 range=(0 2.094395) clamped=true
      PhysicalOffsetFrame RA5P5_offset: socket_parent=/bodyset/RA5P5 translation=(-0.005279 -0.035563 -0.002879)
      PhysicalOffsetFrame RA6M5_offset: socket_parent=/bodyset/RA6M5 translation=(0 0 0)
      SpatialTransform: axes_held_at_zero=(rotation2 rotation3 translation1 translation2 translation3)
        TransformAxis rotation1: coordinates=ra_pip5_e_f axis=(1 -0.2 0.6) LinearFunction(coefficients=1 0)
    CustomJoint RA6M5_RA7D5: socket_parent_frame=RA6M5_offset socket_child_frame=RA7D5_offset
      Coordinate ra_dip5_e_f: default_value=0 range=(-0.5235988 1.570796) clamped=true
      PhysicalOffsetFrame RA6M5_offset: socket_parent=/bodyset/RA6M5 translation=(-0.002871 -0.020677 -0.002243)
      PhysicalOffsetFrame RA7D5_offset: socket_parent=/bodyset/RA7D5 translation=(0 0 0)
      SpatialTransform: axes_held_at_zero=(rotation2 rotation3 translation1 translation2 translation3)
        TransformAxis rotation1: coordinates=ra_dip5_e_f axis=(1 -0.2 0.9) LinearFunction(coefficients=1 0)
  ConstraintSet:
    CoordinateCouplerConstraint [values shared by the 13 below unless stated]: independent_coordinate_names=ra_sh_elv
    CoordinateCouplerConstraint ra_sternoclavicular_r2_con: dependent_coordinate_name=ra_sternoclavicular_r2_d
      coupled_coordinates_function: SimmSpline RA_f0: x=(0 2.61799) y=(0 -0.633555)
    CoordinateCouplerConstraint ra_sternoclavicular_r3_con: dependent_coordinate_name=ra_sternoclavicular_r3_d
      coupled_coordinates_function: SimmSpline RA_f1: x=(0 3.14159) y=(0 0.322013)
    CoordinateCouplerConstraint ra_unrotscap_r2_con: dependent_coordinate_name=ra_unrotscap_r2_d
      coupled_coordinates_function: SimmSpline RA_f2: x=(0 2.61799) y=(0 0.633555)
    CoordinateCouplerConstraint ra_unrotscap_r3_con: dependent_coordinate_name=ra_unrotscap_r3_d
      coupled_coordinates_function: SimmSpline RA_f3: x=(0 3.14159) y=(0 -0.322013)
    CoordinateCouplerConstraint ra_acromioclavicular_r1_con: dependent_coordinate_name=ra_acromioclavicular_r1_d
      coupled_coordinates_function: SimmSpline RA_f4: x=(0 2.61799) y=(0 0.466003)
    CoordinateCouplerConstraint ra_acromioclavicular_r2_con: dependent_coordinate_name=ra_acromioclavicular_r2_d
      coupled_coordinates_function: SimmSpline RA_f5: x=(0 2.61799) y=(0 -0.128282)
    CoordinateCouplerConstraint ra_acromioclavicular_r3_con: dependent_coordinate_name=ra_acromioclavicular_r3_d
      coupled_coordinates_function: SimmSpline RA_f6: x=(0 2.61799) y=(0 1.03673)
    CoordinateCouplerConstraint ra_unrothum_r1_con: dependent_coordinate_name=ra_unrothum_r1_d
      coupled_coordinates_function: SimmSpline RA_f7: x=(0 2.61799) y=(0 -0.466003)
    CoordinateCouplerConstraint ra_unrothum_r2_con: dependent_coordinate_name=ra_unrothum_r2_d
      coupled_coordinates_function: SimmSpline RA_f8: x=(0 2.61799) y=(0 0.128282)
    CoordinateCouplerConstraint ra_unrothum_r3_con: dependent_coordinate_name=ra_unrothum_r3_d
      coupled_coordinates_function: SimmSpline RA_f9: x=(0 2.61799) y=(0 -1.03673)
    CoordinateCouplerConstraint ra_shoulder1_r2_con: independent_coordinate_names=ra_sh_elv_angle
        dependent_coordinate_name=ra_shoulder1_r2_d
      coupled_coordinates_function: SimmSpline RA_f11: x=(-1.5708 3.14159) y=(1.5708 -3.14159)
    CoordinateCouplerConstraint ra_proximal_distal_r1_con: independent_coordinate_names=ra_wr_rd_ud
        dependent_coordinate_name=ra_proximal_distal_r1_d
      coupled_coordinates_function: SimmSpline RA_f18: x=(-0.174533 0 0.436332) y=(-0.261799 0 0.436332)
    CoordinateCouplerConstraint ra_proximal_distal_r3_con: independent_coordinate_names=ra_wr_e_f
        dependent_coordinate_name=ra_proximal_distal_r3_d
      coupled_coordinates_function: SimmSpline RA_f19: x=(-1.22173 1.22173) y=(-0.610865 0.610865)
  ForceSet:
    Schutte1993Muscle_Deprecated RA_DELT1: max_isometric_force=1142.6 optimal_fiber_length=0.0976
        tendon_slack_length=0.093
      PathPoint P1: RA1H (0.00896 -0.11883 0.00585)
      PathPoint P2: RA1H (0.01623 -0.11033 0.00412)
      PathPoint P3: RA_scapula (0.04347 -0.03252 0.00099)
      PathPoint P4: RA_clavicle (-0.014 0.01106 0.08021)
    Schutte1993Muscle_Deprecated RA_DELT2_A: max_isometric_force=1142.6 optimal_fiber_length=0.1078
        tendon_slack_length=0.1095
      PathPoint RA_DELT2-P1: RA1H (0.00461 -0.13611 0.0056)
      PathPoint RA_DELT2-P3: RA_scapula (5e-5 0.00294 0.02233)
      PathPoint RA_DELT2-P4: RA_scapula (-0.01078 -0.00034 0.0062)
    Schutte1993Muscle_Deprecated RA_DELT3: max_isometric_force=259.88 optimal_fiber_length=0.1367
        tendon_slack_length=0.038
      PathPoint P1: RA_scapula (-0.05573 0.00122 -0.02512)
      PathPoint P2: RA_scapula (-0.07247 -0.03285 0.01233)
      PathPoint P3: RA1H (0.00206 -0.07602 0.01045)
    Schutte1993Muscle_Deprecated RA_SUPSP: max_isometric_force=487.82 optimal_fiber_length=0.0682
        tendon_slack_length=0.0395
      PathPoint P1: RA1H (0.00256 0.01063 0.02593)
      PathPoint P2: RA_scapula (-0.01918 0.00127 -0.01271)
      PathPoint P3: RA_scapula (-0.044 -0.01512 -0.05855)
    Schutte1993Muscle_Deprecated RA_INFSP: max_isometric_force=1210.84 optimal_fiber_length=0.0755
        tendon_slack_length=0.0308
      PathPoint P1: RA1H (-0.00887 0.00484 0.02448)
      PathPoint P2: RA_scapula (-0.07382 -0.05476 -0.04781)
    Schutte1993Muscle_Deprecated RA_SUBSC: max_isometric_force=1377.81 optimal_fiber_length=0.0873
        tendon_slack_length=0.033
      PathPoint P1: RA1H (0.01403 0.0084 -0.01331)
      PathPoint P2: RA_scapula (-0.01831 -0.05223 -0.02457)
      PathPoint P3: RA_scapula (-0.07246 -0.03943 -0.06475)
    Schutte1993Muscle_Deprecated RA_TMIN: max_isometric_force=354.25 optimal_fiber_length=0.0741
        tendon_slack_length=0.0713
      PathPoint P1: RA1H (-0.0011 -0.01264 0.02156)
      PathPoint P2: RA_scapula (-0.09473 -0.07991 -0.04737)
      PathPoint P3: RA_scapula (-0.09643 -0.08121 -0.05298)
    Schutte1993Muscle_Deprecated RA_TMAJ: max_isometric_force=425.39 optimal_fiber_length=0.1624
        tendon_slack_length=0.02
      PathPoint P1: RA1H (0.00998 -0.05419 -0.00568)
      PathPoint P2: RA_scapula (-0.10264 -0.10319 -0.05829)
      PathPoint P3: RA_scapula (-0.10489 -0.10895 -0.07117)
    Schutte1993Muscle_Deprecated RA_PECM1_A: max_isometric_force=364.41 optimal_fiber_length=0.1442
        tendon_slack_length=0.0028
      PathPoint RA_PECM1-P1: RA1H (0.01169 -0.04191 0.0078)
      PathPoint RA_PECM1-P4: RA_clavicle (0.00321 -0.00013 0.05113)
    Schutte1993Muscle_Deprecated RA_PECM2_A: max_isometric_force=515.41 optimal_fiber_length=0.1385
        tendon_slack_length=0.089
      PathPoint RA_PECM2-P1: RA1H (0.01274 -0.04289 0.00785)
      PathPoint RA_PECM2-P4: Thorax (0.03091 -0.03922 0.09705)
      PathPoint RA_PECM2-P5: Thorax (0.02769 -0.04498 0.02271)
    Schutte1993Muscle_Deprecated RA_PECM3_A: max_isometric_force=390.55 optimal_fiber_length=0.1385
        tendon_slack_length=0.132
      PathPoint RA_PECM3-P1: RA1H (0.01269 -0.04375 0.0075)
      PathPoint RA_PECM3-P4: Thorax (0.0525 -0.08417 0.08935)
      PathPoint RA_PECM3-P5: Thorax (0.05724 -0.11654 0.03787)
    Schutte1993Muscle_Deprecated RA_LAT1_A: max_isometric_force=389.1 optimal_fiber_length=0.254
        tendon_slack_length=0.12
      PathPoint RA_LAT1-P1: RA1H (0.0105 -0.03415 -0.00653)
      PathPoint RA_LAT1-P4: Thorax (-0.11828 -0.10118 0.03316)
      PathPoint RA_LAT1-P5: Thorax (-0.09578 -0.11724 0.00882)
    Schutte1993Muscle_Deprecated RA_LAT2_A: max_isometric_force=389.1 optimal_fiber_length=0.2324
        tendon_slack_length=0.1765
      PathPoint RA_LAT2-P1: RA1H (0.00968 -0.04071 -0.00611)
      PathPoint RA_LAT2-P4: Thorax (-0.10992 -0.16908 0.02878)
      PathPoint RA_LAT2-P5: Thorax (-0.07186 -0.18818 0.00815)
    Schutte1993Muscle_Deprecated RA_LAT3_A: max_isometric_force=281.66 optimal_fiber_length=0.2789
        tendon_slack_length=0.1403
      PathPoint RA_LAT3-P1: RA1H (0.01208 -0.03922 -0.00416)
      PathPoint RA_LAT3-P4: Thorax (-0.11157 -0.19387 0.05532)
      PathPoint RA_LAT3-P5: Thorax (-0.07117 -0.24858 0.00907)
    Schutte1993Muscle_Deprecated RA_CORB: max_isometric_force=242.46 optimal_fiber_length=0.0932
        tendon_slack_length=0.097
      PathPoint P1: RA_scapula (0.0125 -0.04127 -0.02652)
      PathPoint P2: RA_scapula (0.00483 -0.06958 -0.01563)
      PathPoint P3: RA1H (0.00743 -0.15048 -0.00782)
    Schutte1993Muscle_Deprecated RA_TRIlong: max_isometric_force=798.52 optimal_fiber_length=0.134
        tendon_slack_length=0.143 pennation_angle_at_optimal=0.2094395 [radians]
      PathPoint P1: RA_scapula (-0.04565 -0.04073 -0.01377)
      PathPoint P2: RA1H (-0.02714 -0.11441 -0.00664)
      PathPoint P3: RA1H (-0.03184 -0.22637 -0.01217)
      PathPoint P4: RA1H (-0.01743 -0.26757 -0.01208)
      PathPoint P5: RA2U (-0.0219 0.01046 -0.00078)
      PathWrap: wrap_object=RA_TRI method=hybrid
      PathWrap pathwrap_0: wrap_object=RA_TRIlonghh method=hybrid
      PathWrap pathwrap_1: wrap_object=RA_TRIlongglen method=hybrid
    Schutte1993Muscle_Deprecated RA_TRIlat: max_isometric_force=624.3 optimal_fiber_length=0.1138
        tendon_slack_length=0.098 pennation_angle_at_optimal=0.1570796
      PathPoint P1: RA1H (-0.00599 -0.12646 0.00428)
      PathPoint P2: RA1H (-0.02344 -0.14528 0.00928)
      PathPoint P3: RA1H (-0.03184 -0.22637 -0.01217)
      PathPoint P4: RA1H (-0.01743 -0.26757 -0.01208)
      PathPoint P5: RA2U (-0.0219 0.01046 -0.00078)
      PathWrap: wrap_object=RA_TRI method=hybrid
    Schutte1993Muscle_Deprecated RA_TRImed: max_isometric_force=624.3 optimal_fiber_length=0.1138
        tendon_slack_length=0.0908 pennation_angle_at_optimal=0.1570796
      PathPoint P1: RA1H (-0.00838 -0.13695 -0.00906)
      PathPoint P2: RA1H (-0.02601 -0.15139 -0.0108)
      PathPoint P3: RA1H (-0.03184 -0.22637 -0.01217)
      PathPoint P4: RA1H (-0.01743 -0.26757 -0.01208)
      PathPoint P5: RA2U (-0.0219 0.01046 -0.00078)
      PathWrap: wrap_object=RA_TRI method=hybrid
    Schutte1993Muscle_Deprecated RA_ANC: max_isometric_force=350 optimal_fiber_length=0.027 tendon_slack_length=0.018
        pennation_angle_at_optimal=0
      PathPoint P1: RA1H (-0.00744 -0.28359 0.00979)
      PathPoint P2: RA2U (-0.02532 -0.00124 0.006)
      PathWrap: wrap_object=RA_ANC method=hybrid
    Schutte1993Muscle_Deprecated RA_SUP: max_isometric_force=476 optimal_fiber_length=0.033 tendon_slack_length=0.028
        pennation_angle_at_optimal=0
      PathPoint P1: RA2R (0.00996 -0.06096 0.00075)
      PathPoint P2: RA2R (0.01201 -0.0517 -0.00107)
      PathPoint P3: RA2U (-0.0136 -0.03384 0.02013)
      PathWrap: wrap_object=RA_SUP method=hybrid
    Schutte1993Muscle_Deprecated RA_BIClong_A: max_isometric_force=624.3 optimal_fiber_length=0.1157
        tendon_slack_length=0.2723 pennation_angle_at_optimal=0
      PathPoint RA_BIClong-P1: RA_scapula (-0.03123 -0.02353 -0.01305)
      PathPoint RA_BIClong-P2: RA_scapula (-0.02094 -0.01309 -0.00461)
      PathPoint RA_BIClong-P3: RA1H (0.02131 0.01793 0.01028)
      PathPoint RA_BIClong-P4: RA1H (0.02378 -0.00511 0.01201)
      PathPoint RA_BIClong-P5: RA1H (0.01345 -0.02827 0.00136)
      PathPoint RA_BIClong-P6: RA1H (0.01068 -0.07736 -0.00165)
      PathPoint RA_BIClong-P7: RA1H (0.01703 -0.12125 0.00024)
      PathPoint RA_BIClong-P8: RA1H (0.0228 -0.1754 -0.0063)
      PathPoint RA_BIClong-P11: RA2R (-0.002 -0.0375 -0.002)
      PathWrap: wrap_object=RA_Elbow_BIC_BRD method=hybrid
      PathWrap pathwrap_0: wrap_object=RA_BIClong method=hybrid range=(2 3)
    Schutte1993Muscle_Deprecated RA_BICshort_A: max_isometric_force=435.56 optimal_fiber_length=0.1321
        tendon_slack_length=0.1923 pennation_angle_at_optimal=0
      PathPoint RA_BICshort-P1: RA_scapula (0.01268 -0.03931 -0.02625)
      PathPoint RA_BICshort-P2: RA_scapula (0.00093 -0.06704 -0.01593)
      PathPoint RA_BICshort-P3: RA1H (0.01117 -0.07576 -0.01101)
      PathPoint RA_BICshort-P4: RA1H (0.01703 -0.12125 -0.01079)
      PathPoint RA_BICshort-P5: RA1H (0.0228 -0.1754 -0.0063)
      PathPoint RA_BICshort-P8: RA2R (-0.002 -0.0375 -0.002)
      PathWrap: wrap_object=RA_Elbow_BIC_BRD method=hybrid
    Schutte1993Muscle_Deprecated RA_BRA: max_isometric_force=987.26 optimal_fiber_length=0.0858
        tendon_slack_length=0.0535 pennation_angle_at_optimal=0
      PathPoint P1: RA1H (0.0068 -0.1739 -0.0036)
      ConditionalPathPoint P2: RA1H (0.01894 -0.28559 -0.01105) socket_coordinate=/jointset/RA1H_RA2U/ra_el_e_f
          range=(0 0.813149) [radians]
      ConditionalPathPoint P3: RA2U (0.00498 -0.01463 0.00128) socket_coordinate=/jointset/RA1H_RA2U/ra_el_e_f
          range=(0 0.813149)
      PathPoint P4: RA2U (-0.0032 -0.0239 0.0009)
    Schutte1993Muscle_Deprecated RA_BRD: max_isometric_force=261.33 optimal_fiber_length=0.1726
        tendon_slack_length=0.133 pennation_angle_at_optimal=0
      PathPoint P1: RA1H (-0.0098 -0.19963 0.00223)
      PathPoint P2: RA2R (0.03577 -0.12742 0.02315)
      PathPoint P3: RA2R (0.0419 -0.221 0.0224)
      PathWrap: wrap_object=RA_Elbow_BIC_BRD method=hybrid
    Schutte1993Muscle_Deprecated RA_ECRL: max_isometric_force=304.89 optimal_fiber_length=0.081
        tendon_slack_length=0.224 pennation_angle_at_optimal=0
      PathPoint P1: RA1H (-0.0073 -0.2609 0.0091)
      PathPoint P2: RA2R (0.03195 -0.13463 0.02779)
      PathPoint P3: RA2R (0.04243 -0.23684 0.0362)
      PathPoint P4: RA4M2 (0.00249 0.0164 0.0008)
      PathWrap: wrap_object=RA_Elbow_PT_ECRL method=hybrid
      PathWrap pathwrap_0: wrap_object=RA_ECRL method=hybrid
    Schutte1993Muscle_Deprecated RA_ECRB: max_isometric_force=100.52 optimal_fiber_length=0.0585
        tendon_slack_length=0.2223 pennation_angle_at_optimal=0.1553343
      PathPoint P1: RA1H (0.01349 -0.29048 0.01698)
      PathPoint P2: RA2R (0.02905 -0.13086 0.02385)
      PathPoint P3: RA2R (0.03549 -0.22805 0.03937)
      PathPoint P4: RA4M3 (0.00452 0.02788 0.00112)
      PathWrap: wrap_object=RA_ECRB method=hybrid
    Schutte1993Muscle_Deprecated RA_ECU: max_isometric_force=93.17 optimal_fiber_length=0.0622
        tendon_slack_length=0.2285 pennation_angle_at_optimal=0.06108652
      PathPoint P1: RA1H (0.00083 -0.28955 0.0188)
      PathPoint P2: RA2U (-0.01391 -0.03201 0.02947)
      PathPoint P3: RA2U (-0.01705 -0.05428 0.02868)
      PathPoint P4: RA2U (-0.01793 -0.09573 0.03278)
      PathPoint P5: RA2R (-0.01421 -0.22696 0.03481)
      PathPoint P6: RA4M5 (-0.00061 0.02067 0.00294)
      PathWrap: wrap_object=RA_ECU method=hybrid
    Schutte1993Muscle_Deprecated RA_FCR: max_isometric_force=73.96 optimal_fiber_length=0.0628
        tendon_slack_length=0.244 pennation_angle_at_optimal=0.05410521
      PathPoint P1: RA1H (0.00758 -0.27806 -0.03705)
      PathPoint P2: RA2R (0.0211 -0.21943 0.00127)
      PathPoint P3: RA4M2 (-0.00345 0.01918 -0.00921)
      PathWrap: wrap_object=RA_Elbow_PT_ECRL method=hybrid
      PathWrap pathwrap_0: wrap_object=RA_FCR method=hybrid
    Schutte1993Muscle_Deprecated RA_FCU_A: max_isometric_force=128.93 optimal_fiber_length=0.0509
        tendon_slack_length=0.265 pennation_angle_at_optimal=0.2111848
      PathPoint RA_FCU-P1: RA1H (0.00219 -0.2774 -0.0388)
      PathPoint RA_FCU-P3: RA2R (0.01082 -0.22327 0.00969)
      PathPoint RA_FCU-P4: RA4M5 (0.00154 0.01703 -0.0033)
      PathWrap: wrap_object=RA_FCU method=hybrid
      PathWrap pathwrap_0: wrap_object=RA_Elbow_PT_ECRL method=hybrid
    Schutte1993Muscle_Deprecated RA_PL: max_isometric_force=26.72 optimal_fiber_length=0.0638
        tendon_slack_length=0.2694 pennation_angle_at_optimal=0.06981317
      PathPoint P1: RA1H (0.00457 -0.27519 -0.03865)
      PathPoint P2: RA2R (0.02531 -0.23915 -0.00276)
      PathPoint P3: RA3C (0.00917 -0.01898 -0.01754)
      PathPoint P4: RA4M3 (0.00179 0.00828 -0.00245)
      PathWrap: wrap_object=RA_PL method=hybrid
      PathWrap pathwrap_0: wrap_object=RA_Elbow_PT_ECRL method=hybrid
    Schutte1993Muscle_Deprecated RA_PT_A: max_isometric_force=566.22 optimal_fiber_length=0.0492
        tendon_slack_length=0.098 pennation_angle_at_optimal=0.1745329
      PathPoint RA_PT-P1: RA1H (0.0036 -0.2759 -0.0365)
      PathPoint RA_PT-P2: RA2U (0.00846 -0.03373 -0.01432)
      ConditionalPathPoint RA_PT-P4: RA2R (0.0236 -0.0934 0.0094) socket_coordinate=/jointset/RA2U_RA2R/ra_wr_sup_pro
          range=(-1.5708 0.509636)
      PathPoint RA_PT-P5: RA2R (0.0254 -0.1088 0.0198)
      PathWrap: wrap_object=RA_Elbow_PT_ECRL method=hybrid
    Schutte1993Muscle_Deprecated RA_PQ: max_isometric_force=75.48 optimal_fiber_length=0.0282 tendon_slack_length=0.005
        pennation_angle_at_optimal=0.1745329
      PathPoint P1: RA2R (0.03245 -0.19998 0.01962)
      PathPoint P2: RA2U (0.00193 -0.20972 0.03632)
      PathWrap: wrap_object=RA_PQ2 method=hybrid
      PathWrap pathwrap_0: wrap_object=RA_PQ1 method=hybrid
    Schutte1993Muscle_Deprecated RA_FDS5: max_isometric_force=16.55 optimal_fiber_length=0.0515
        tendon_slack_length=0.3383 pennation_angle_at_optimal=0.08726646
      PathPoint P1: RA1H (0.00421 -0.27598 -0.03864)
      PathPoint P2: RA2R (0.01377 -0.18718 0.00205)
      PathPoint P3: RA3C (-0.00235 -0.01393 -0.01376)
      PathPoint P4: RA4M4 (-0.00294 0.00846 -0.01213)
      PathPoint P5: RA4M5 (-0.00032 -0.01968 -0.00757)
      PathPoint P6: RA5P5 (-0.00323 -0.03568 -0.00417)
      PathPoint P7: RA6M5 (-0.0026 -0.01983 -0.0035)
      PathWrap: wrap_object=RA_FDS method=hybrid
      PathWrap pathwrap_0: wrap_object=RA_Elbow_PT_ECRL method=hybrid
    Schutte1993Muscle_Deprecated RA_FDS4: max_isometric_force=57.9 optimal_fiber_length=0.0736
        tendon_slack_length=0.328 pennation_angle_at_optimal=0.06981317
      PathPoint P1: RA1H (0.00479 -0.2788 -0.03731)
      PathPoint P2: RA2R (0.01571 -0.18666 0.00267)
      PathPoint P3: RA3C (-0.00082 -0.01344 -0.01359)
      PathPoint P4: RA4M3 (-0.00914 0.00544 -0.01085)
      PathPoint P5: RA4M4 (-0.0029 -0.02334 -0.00767)
      PathPoint P6: RA5P4 (-0.00172 -0.03947 -0.00102)
      PathPoint P7: RA6M4 (-2e-5 -0.02501 0.00029)
      PathWrap: wrap_object=RA_FDS method=hybrid
      PathWrap pathwrap_0: wrap_object=RA_Elbow_PT_ECRL method=hybrid
    Schutte1993Muscle_Deprecated RA_FDS3: max_isometric_force=91.03 optimal_fiber_length=0.0749
        tendon_slack_length=0.295 pennation_angle_at_optimal=0.122173
      PathPoint P1: RA2U (-0.00669 -0.02713 -0.00191)
      PathPoint P2: RA2R (0.01899 -0.18706 0.00424)
      PathPoint P3: RA3C (0.0068 -0.01377 -0.01399)
      PathPoint P4: RA4M3 (0.00128 0.00639 -0.00952)
      PathPoint P5: RA4M3 (0.00263 -0.02478 -0.00183)
      PathPoint P6: RA5P3 (0.00252 -0.04307 0.00417)
      PathPoint P7: RA6M3 (0.00155 -0.02773 0.00067)
      PathWrap: wrap_object=RA_FDS method=hybrid
    Schutte1993Muscle_Deprecated RA_FDS2: max_isometric_force=61.24 optimal_fiber_length=0.0835
        tendon_slack_length=0.275 pennation_angle_at_optimal=0.1047198
      PathPoint P1: RA2U (-0.00676 -0.02819 -0.00137)
      PathPoint P2: RA2R (0.02145 -0.18623 0.00552)
      PathPoint P3: RA3C (0.00889 -0.01366 -0.01387)
      PathPoint P4: RA4M2 (-0.00407 -0.00025 -0.00479)
      PathPoint P5: RA4M2 (0.00304 -0.02206 -0.00579)
      PathPoint P6: RA5P2 (0.00427 -0.03367 0.00444)
      PathPoint P7: RA6M2 (0.00228 -0.02088 -0.00029)
      PathWrap: wrap_object=RA_FDS method=hybrid
      PathWrap pathwrap_0: wrap_object=RA_2ndmcp method=hybrid
    Schutte1993Muscle_Deprecated RA_FDP5: max_isometric_force=79.65 optimal_fiber_length=0.0749
        tendon_slack_length=0.2819 pennation_angle_at_optimal=0.1396263
      PathPoint P1: RA2U (-0.00628 -0.03214 0.00254)
      PathPoint P2: RA2R (0.01409 -0.18516 0.00861)
      PathPoint P3: RA3C (-0.00088 -0.01027 -0.01188)
      PathPoint P4: RA4M4 (-0.00686 0.0089 -0.00619)
      PathPoint P5: RA4M5 (-0.00185 -0.01878 -0.00706)
      PathPoint P6: RA5P5 (-0.0049 -0.03465 -0.00598)
      PathPoint P7: RA7D5 (-0.00032 -0.00433 -0.00165)
      PathWrap: wrap_object=RA_FDP method=hybrid
    Schutte1993Muscle_Deprecated RA_FDP4: max_isometric_force=64.08 optimal_fiber_length=0.0798
        tendon_slack_length=0.282 pennation_angle_at_optimal=0.122173
      PathPoint P1: RA2U (-0.00502 -0.03374 0.00273)
      PathPoint P2: RA2R (0.0158 -0.18629 0.00803)
      PathPoint P3: RA3C (0.00106 -0.01177 -0.01184)
      PathPoint P4: RA4M3 (-0.0104 0.00473 -0.00804)
      PathPoint P5: RA4M4 (-0.00289 -0.02297 -0.00609)
      PathPoint P6: RA5P4 (-0.00304 -0.04002 -0.00075)
      PathPoint P7: RA7D4 (0.0001 -0.0066 -0.00066)
      PathWrap: wrap_object=RA_FDP method=hybrid
    Schutte1993Muscle_Deprecated RA_FDP3: max_isometric_force=81.65 optimal_fiber_length=0.0835
        tendon_slack_length=0.293 pennation_angle_at_optimal=0.1047198
      PathPoint P1: RA2U (-0.00522 -0.03327 0.0021)
      PathPoint P2: RA2R (0.01906 -0.18644 0.00785)
      PathPoint P3: RA3C (0.00335 -0.0128 -0.01144)
      PathPoint P4: RA4M3 (-0.00128 0.00609 -0.00838)
      PathPoint P5: RA4M3 (0.00034 -0.02347 -0.00303)
      PathPoint P6: RA5P3 (0.00102 -0.04333 0.00294)
      PathPoint P7: RA7D3 (0.00023 -0.00505 -0.00226)
      PathWrap: wrap_object=RA_FDP method=hybrid
    Schutte1993Muscle_Deprecated RA_ED5_A: max_isometric_force=13.11 optimal_fiber_length=0.065
        tendon_slack_length=0.2965 pennation_angle_at_optimal=0.03490659
      PathPoint RA_ED5-P1: RA1H (-0.0004 -0.28831 0.0187)
      PathPoint RA_ED5-P3: RA2R (0.00993 -0.22304 0.03618)
      PathPoint RA_ED5-P4: RA4M5 (-0.00478 -0.01915 0.00447)
      PathPoint RA_ED5-P5: RA5P5 (-0.00716 -0.03302 -0.00089)
      PathPoint RA_ED5-P6: RA7D5 (-0.00142 0.00068 0.00115)
      PathWrap: wrap_object=RA_ED5 method=hybrid range=(2 3)
    Schutte1993Muscle_Deprecated RA_ED4_A: max_isometric_force=34.04 optimal_fiber_length=0.0626
        tendon_slack_length=0.327 pennation_angle_at_optimal=0.05235988
      PathPoint RA_ED4-P1: RA1H (-0.00156 -0.28936 0.01782)
      PathPoint RA_ED4-P3: RA2R (0.00882 -0.22366 0.04284)
      PathPoint RA_ED4-P4: RA4M4 (-0.00338 -0.0233 0.00513)
      PathPoint RA_ED4-P5: RA5P4 (-0.00546 -0.03868 0.00413)
      PathPoint RA_ED4-P6: RA7D4 (-0.00171 -0.00375 0.00241)
      PathWrap: wrap_object=RA_ED4 method=hybrid range=(2 3)
    Schutte1993Muscle_Deprecated RA_ED3_A: max_isometric_force=35.32 optimal_fiber_length=0.0724
        tendon_slack_length=0.335 pennation_angle_at_optimal=0.05235988
      PathPoint RA_ED3-P1: RA1H (0.00051 -0.28984 0.01949)
      PathPoint RA_ED3-P3: RA2R (0.0144 -0.22323 0.04223)
      PathPoint RA_ED3-P4: RA4M3 (0.00131 -0.02342 0.00764)
      PathPoint RA_ED3-P5: RA5P3 (0.00179 -0.04239 0.01003)
      PathPoint RA_ED3-P6: RA7D3 (0.00077 -0.01111 0.00201)
      PathWrap: wrap_object=RA_ED3 method=hybrid
    Schutte1993Muscle_Deprecated RA_EDM: max_isometric_force=25.25 optimal_fiber_length=0.0675
        tendon_slack_length=0.322 pennation_angle_at_optimal=0.05235988
      PathPoint P1: RA1H (0.00089 -0.28919 0.01847)
      PathPoint P2: RA2U (-0.00977 -0.03907 0.03085)
      PathPoint P3: RA2U (-0.00755 -0.08267 0.03646)
      PathPoint P4: RA2R (0.00454 -0.22641 0.03678)
      PathPoint P5: RA4M5 (0.00131 0.02436 0.00794)
      PathPoint P6: RA4M5 (-0.00537 -0.01848 0.00316)
      PathPoint P7: RA5P5 (-0.0054 -0.03237 0.00015)
      PathPoint P8: RA7D5 (-0.00226 -0.00334 0.00062)
      PathWrap: wrap_object=RA_EDM method=hybrid range=(4 5)
    Schutte1993Muscle_Deprecated RA_EPL: max_isometric_force=39.46 optimal_fiber_length=0.054
        tendon_slack_length=0.2205 pennation_angle_at_optimal=0.1047198
      PathPoint P1: RA2U (-0.01412 -0.09706 0.02952)
      PathPoint P2: RA2R (0.00124 -0.13668 0.0227)
      PathPoint P3: RA2R (0.02702 -0.21872 0.03828)
      PathPoint P4: RA2R (0.03382 -0.22754 0.04607)
      PathPoint P5: RA2R (0.04234 -0.23771 0.04173)
      PathPoint P6: RA3C (0.02428 0.00014 0.00608)
      PathPoint P7: RA3T (0.00809 -0.0046 0.00992)
      PathPoint P8: RA4M1 (0.00656 -0.0043 0.00792)
      PathPoint P9: RA4M1 (0.02165 -0.0242 -0.00533)
      PathPoint P10: RA5P1 (0.01147 -0.00362 0.00156)
      PathPoint P11: RA5P1 (0.01921 -0.0265 -0.01038)
      PathPoint P12: RA6D1 (0.00543 -0.00714 -0.00464)
      PathWrap: wrap_object=RA_MPthumb method=hybrid
    Schutte1993Muscle_Deprecated RA_EPB: max_isometric_force=14.2 optimal_fiber_length=0.0675
        tendon_slack_length=0.1155 pennation_angle_at_optimal=0.1256637
      PathPoint P1: RA2R (0.01924 -0.14695 0.02114)
      PathPoint P2: RA2R (0.02276 -0.15857 0.02665)
      PathPoint P3: RA2R (0.03831 -0.19722 0.03834)
      PathPoint P4: RA2R (0.05235 -0.23611 0.02699)
      PathPoint P5: RA3C (0.03123 0.00256 -0.00327)
      PathPoint P6: RA4M1_PHANT (0.01443 -0.00337 -0.00405)
      PathPoint P7: RA4M1 (0.02173 -0.02303 -0.01141)
      PathPoint P8: RA5P1 (0.00927 -0.00618 -0.00557)
      PathWrap: wrap_object=RA_MPthumb method=hybrid
    Schutte1993Muscle_Deprecated RA_FPL_A: max_isometric_force=77.2 optimal_fiber_length=0.0552
        tendon_slack_length=0.1938 pennation_angle_at_optimal=0.122173
      PathPoint RA_FPL-P1: RA2R (0.00971 -0.09458 0.01769)
      PathPoint RA_FPL-P2: RA2R (0.01658 -0.13525 0.01915)
      PathPoint RA_FPL-P3: RA2R (0.01869 -0.17932 0.01988)
      PathPoint RA_FPL-P4: RA2R (0.038 -0.23171 0.0158)
      PathPoint RA_FPL-P7: RA4M1 (-0.00608 -0.01624 -0.0094)
      PathPoint RA_FPL-P8: RA4M1 (0.00208 -0.02297 -0.00956)
      PathPoint RA_FPL-P9: RA5P1 (-0.0045 -0.01842 -0.00508)
      PathPoint RA_FPL-P10: RA5P1 (0.0059 -0.02602 -0.01114)
      PathPoint RA_FPL-P11: RA6D1 (0.00242 -0.01127 -0.00412)
      PathWrap: wrap_object=RA_FPL method=hybrid
      PathWrap pathwrap_0: wrap_object=RA_IPthumb method=hybrid
      PathWrap pathwrap_1: wrap_object=RA_MPthumb method=hybrid
    Schutte1993Muscle_Deprecated RA_APL_A: max_isometric_force=59.53 optimal_fiber_length=0.0713
        tendon_slack_length=0.1295 pennation_angle_at_optimal=0.1308997
      PathPoint RA_APL-P1: RA2R (0.01154 -0.09477 0.01681)
      PathPoint RA_APL-P2: RA2R (0.0303 -0.1397 0.03507)
      PathPoint RA_APL-P3: RA2R (0.03993 -0.16072 0.034)
      PathPoint RA_APL-P4: RA2R (0.04397 -0.17845 0.03134)
      PathPoint RA_APL-P5: RA2R (0.05505 -0.23084 0.02368)
      PathPoint RA_APL-P7: RA4M1_PHANT (0.01058 0.00662 -0.00619)
      PathPoint RA_APL-P8: RA4M1 (0.00629 0.00323 -0.00589)
      PathPoint RA_APL-P9: RA4M1 (0.00827 -0.00586 -0.00604)
      PathWrap: wrap_object=RA_APL method=hybrid range=(5 6)
    ObjectGroup RA_shoulder: members=(RA_DELT1 RA_DELT2_A RA_DELT3 RA_SUPSP RA_INFSP RA_SUBSC RA_TMIN RA_TMAJ RA_PECM1_A RA_PECM2_A RA_PECM3_A RA_LAT1_A RA_LAT2_A RA_LAT3_A RA_CORB)
    ObjectGroup RA_elbow: members=(RA_ANC RA_BIClong_A RA_BICshort_A RA_BRA RA_BRD RA_ECRL RA_PT_A RA_TRIlat RA_TRIlong RA_TRImed)
    ObjectGroup RA_forearm: members=(RA_APL_A RA_ECRB RA_ECU RA_ED2_A RA_ED5_A RA_ED3_A RA_ED4_A RA_EDM RA_EIP RA_EPB RA_EPL RA_FCR RA_FCU_A RA_FDP2 RA_FDP5 RA_FDP3 RA_FDP4 RA_FDS2 RA_FDS5 RA_FDS3 RA_FDS4 RA_FPL_A RA_PL RA_PQ RA_PT_A RA_SUP)
    ObjectGroup RA_extensor: members=(RA_ECRB RA_ECU RA_ED2_A RA_ED5_A RA_ED3_A RA_ED4_A RA_EDM RA_EIP RA_EPL)
    ObjectGroup RA_radial: members=(RA_APL_A RA_ECRB RA_ED2_A RA_ED3_A RA_EIP RA_EPB RA_EPL RA_FCR RA_FDP2 RA_FDS2 RA_FDS3 RA_FPL_A RA_PL)
    ObjectGroup RA_wrist: members=(RA_ECRB RA_ECU RA_FCR RA_FCU_A)
    ObjectGroup RA_ulnar: members=(RA_ECU RA_ED5_A RA_ED4_A RA_EDM RA_FCU_A RA_FDP5 RA_FDP3 RA_FDP4 RA_FDS5 RA_FDS4)
    ObjectGroup RA_flexor: members=(RA_APL_A RA_EPB RA_FCR RA_FCU_A RA_FDP2 RA_FDP5 RA_FDP3 RA_FDP4 RA_FDS2 RA_FDS5 RA_FDS3 RA_FDS4 RA_FPL_A RA_PL)
    ObjectGroup RA_hand: members=(RA_APL_A RA_ED2_A RA_ED5_A RA_ED3_A RA_ED4_A RA_EDM RA_EIP RA_EPB RA_EPL RA_FDP2 RA_FDP5 RA_FDP3 RA_FDP4 RA_FDS2 RA_FDS5 RA_FDS3 RA_FDS4 RA_FPL_A RA_PL)
    ObjectGroup RA_thumb: members=(RA_APL_A RA_EPB RA_EPL RA_FPL_A)
